# OpenSim document version 30516
Model gait9dof18musc:
  gravity: 0 -9.80665 0
  length_units: meters
  force_units: N
  credits:
    A planar reduced gait model with 9 degrees of freedom and 18 muscles by Ajay Seth. Adjusted by Carmichael Ong to follow muscle strengths of Handsfield/Rajagopal and changed hamstrings to follow semimembranosus and to adjust passive curves of hamstrings, rect_fem, and vasti. Closely based on Delp S.L., Loan J.P., Hoy M.G., Zajac F.E., Topp E.L., Rosen J.M., Thelen D.G., Anderson F.C., Seth A. Notes: 3D, 23 DOF gait model created by D.G. Thelen, Univ. of Wisconsin-Madison, and Ajay Seth, Frank C. Anderson, and Scott L. Delp, Stanford University. Lower extremity joint defintions based on Delp et al. (1990). Low back joint and anthropometry based on Anderson and Pandy (1999, 2001). Planar knee model of Yamaguchi and Zajac (1989). Seth replaced tibia translation constraints with a CustomJoint for the knee and removed the patella to eliminate all kinematic constraints; insertions of the quadrucepts are handled with moving points in the tibia frame as defined by Delp 1990. Number of muscles was reduced by Anderson to improve simulation speed for demonstrations and is not intended to be used in research. License: Creative Commons (CCBY 3.0). You are free to distribute, remix, tweak, and build upon this work, even commercially, as long as you credit us for the original creation. http://creativecommons.org/licenses/by/3.0/ More Information: http://simtk-confluence.stanford.edu:8080/display/OpenSim/Gait+2392+and+2354+Models
  publications:
    Delp, S.L., Loan, J.P., Hoy, M.G., Zajac, F.E., Topp E.L., Rosen, J.M.: An interactive graphics-based model of the lower extremity to study orthopaedic surgical procedures, IEEE Transactions on Biomedical Engineering, vol. 37, pp. 757-767, 1990. Yamaguchi G.T., Zajac F.E.: A planar model of the knee joint to characterize the knee extensor mechanism." J . Biomech. vol. 22. pp. 1-10. 1989. Anderson F.C., Pandy M.G.: A dynamic optimization solution for vertical jumping in three dimensions. Computer Methods in Biomechanics and Biomedical Engineering 2:201-231, 1999. Anderson F.C., Pandy M.G.: Dynamic optimization of human walking. Journal of Biomechanical Engineering 123:381-390, 2001.
  Ground
  BodySet:
    Body pelvis: mass=11.777 [kg] mass_center=(-0.0707 0 0) inertia=(0.1028 0.0871 0.0579 0 0 0)
        meshes=(sacrum.vtp pelvis.vtp l_pelvis.vtp)
    Body femur_r: mass=9.3014 mass_center=(0 -0.17 0) inertia=(0.1339 0.0351 0.1412 0 0 0) meshes=femur.vtp
    Body tibia_r: mass=3.7075 mass_center=(0 -0.1867 0) inertia=(0.0504 0.0051 0.0511 0 0 0)
        meshes=(tibia.vtp fibula.vtp)
    Body talus_r: mass=0.1 mass_center=(0 0 0) inertia=(0.001 0.001 0.001 0 0 0) meshes=talus.vtp
    Body calcn_r: mass=1.25 mass_center=(0.1 0.03 0) inertia=(0.0014 0.0039 0.0041 0 0 0) meshes=foot.vtp
    Body toes_r: mass=0.2166 mass_center=(0.0346 0.006 -0.0175) inertia=(0.0001 0.0002 0.0001 0 0 0) meshes=bofoot.vtp
    Body femur_l: mass=9.3014 mass_center=(0 -0.17 0) inertia=(0.1339 0.0351 0.1412 0 0 0) meshes=l_femur.vtp
    Body tibia_l: mass=3.7075 mass_center=(0 -0.1867 0) inertia=(0.0504 0.0051 0.0511 0 0 0)
        meshes=(l_tibia.vtp l_fibula.vtp)
    Body talus_l: mass=0.1 mass_center=(0 0 0) inertia=(0.001 0.001 0.001 0 0 0) meshes=l_talus.vtp
    Body calcn_l: mass=1.25 mass_center=(0.1 0.03 0) inertia=(0.0014 0.0039 0.0041 0 0 0) meshes=l_foot.vtp
    Body toes_l: mass=0.2166 mass_center=(0.0346 0.006 0.0175) inertia=(0.0001 0.0002 0.0001 0 0 0) meshes=l_bofoot.vtp
    Body torso: mass=34.2366 mass_center=(-0.03 0.32 0) inertia=(1.4745 0.7555 1.4314 0 0 0)
        meshes=(hat_spine.vtp hat_jaw.vtp hat_skull.vtp hat_ribs.vtp)
    Body head: mass=0 mass_center=(0 0 0) inertia=(0 0 0 0 0 0)
  JointSet:
    PlanarJoint ground_pelvis: socket_parent_frame_connectee_name=../ground socket_child_frame_connectee_name=../pelvis
      Coordinate pelvis_tilt: default_value=-0.05 range=(-1.570796 1.570796) clamped=false
      Coordinate pelvis_tx: default_value=0 range=(-5 5) clamped=false
      Coordinate pelvis_ty: default_value=0.93 range=(-1 2) clamped=false
    PinJoint hip_r: socket_parent_frame_connectee_name=pelvis_offset socket_child_frame_connectee_name=../femur_r
      Coordinate hip_flexion_r: default_value=0 range=(-2.094395 2.094395) clamped=false
      PhysicalOffsetFrame pelvis_offset: socket_parent_connectee_name=../../pelvis
          translation=(-0.0707 -0.0661 0.0835) [meters]
    CustomJoint knee_r: socket_parent_frame_connectee_name=../femur_r socket_child_frame_connectee_name=../tibia_r
      Coordinate knee_angle_r: default_value=0 range=(-2.094395 0.1745329) clamped=false
      SpatialTransform: axes_held_at_zero=(rotation2 rotation3 translation3)
        TransformAxis rotation1: coordinates=knee_angle_r axis=(0 0 1) LinearFunction(coefficients=1 0)
        TransformAxis translation1: coordinates=knee_angle_r axis=(1 0 0)
          SimmSpline: x=(-2.0944 -1.74533 -1.39626 -1.0472 -0.698132 -0.349066 -0.174533 0.197344 0.337395 0.490178 1.52146 2.0944)
              y=(-0.0032 0.00179 0.00411 0.0041 0.00212 -0.001 -0.0031 -0.005227 -0.005435 -0.005574 -0.005435 -0.00525)
        TransformAxis translation2: coordinates=knee_angle_r axis=(0 1 0)
          SimmSpline: x=(-2.0944 -1.22173 -0.523599 -0.349066 -0.174533 0.159149 2.0944)
              y=(-0.4226 -0.4082 -0.399 -0.3976 -0.3966 -0.395264 -0.396)
    PinJoint ankle_r: socket_parent_frame_connectee_name=tibia_r_offset socket_child_frame_connectee_name=../talus_r
      Coordinate ankle_angle_r: default_value=0.08 range=(-1.570796 1.570796) clamped=false
      PhysicalOffsetFrame tibia_r_offset: socket_parent_connectee_name=../../tibia_r translation=(0 -0.43 0)
    WeldJoint subtalar_r: socket_parent_frame_connectee_name=talus_r_offset
        socket_child_frame_connectee_name=../calcn_r
      PhysicalOffsetFrame talus_r_offset: socket_parent_connectee_name=../../talus_r
          translation=(-0.04877 -0.04195 0.00792)
    WeldJoint mtp_r: socket_parent_frame_connectee_name=calcn_r_offset socket_child_frame_connectee_name=../toes_r
      PhysicalOffsetFrame calcn_r_offset: socket_parent_connectee_name=../../calcn_r
          translation=(0.1788 -0.002 0.00108)
    PinJoint hip_l: socket_parent_frame_connectee_name=pelvis_offset socket_child_frame_connectee_name=../femur_l
      Coordinate hip_flexion_l: default_value=0 range=(-2.094395 2.094395) clamped=false
      PhysicalOffsetFrame pelvis_offset: socket_parent_connectee_name=../../pelvis
          translation=(-0.0707 -0.0661 -0.0835)
    CustomJoint knee_l: socket_parent_frame_connectee_name=../femur_l socket_child_frame_connectee_name=../tibia_l
      Coordinate knee_angle_l: default_value=0 range=(-2.094395 0.1745329) clamped=false
      SpatialTransform: axes_held_at_zero=(rotation2 rotation3 translation3)
        TransformAxis rotation1: coordinates=knee_angle_l axis=(0 0 1) LinearFunction(coefficients=1 0)
        TransformAxis translation1: coordinates=knee_angle_l axis=(1 0 0)
          SimmSpline: x=(-2.0944 -1.74533 -1.39626 -1.0472 -0.698132 -0.349066 -0.174533 0.197344 0.337395 0.490178 1.52146 2.0944)
              y=(-0.0032 0.00179 0.00411 0.0041 0.00212 -0.001 -0.0031 -0.005227 -0.005435 -0.005574 -0.005435 -0.00525)
        TransformAxis translation2: coordinates=knee_angle_l axis=(0 1 0)
          SimmSpline: x=(-2.0944 -1.22173 -0.523599 -0.349066 -0.174533 0.159149 2.0944)
              y=(-0.4226 -0.4082 -0.399 -0.3976 -0.3966 -0.395264 -0.396)
    PinJoint ankle_l: socket_parent_frame_connectee_name=tibia_l_offset socket_child_frame_connectee_name=../talus_l
      Coordinate ankle_angle_l: default_value=0.08 range=(-1.047198 1.047198) clamped=false
      PhysicalOffsetFrame tibia_l_offset: socket_parent_connectee_name=../../tibia_l translation=(0 -0.43 0)
    WeldJoint subtalar_l: socket_parent_frame_connectee_name=talus_l_offset
        socket_child_frame_connectee_name=../calcn_l
      PhysicalOffsetFrame talus_l_offset: socket_parent_connectee_name=../../talus_l
          translation=(-0.04877 -0.04195 -0.00792)
    WeldJoint mtp_l: socket_parent_frame_connectee_name=calcn_l_offset socket_child_frame_connectee_name=../toes_l
      PhysicalOffsetFrame calcn_l_offset: socket_parent_connectee_name=../../calcn_l
          translation=(0.1788 -0.002 -0.00108)
    PinJoint back: socket_parent_frame_connectee_name=pelvis_offset socket_child_frame_connectee_name=../torso
      Coordinate lumbar_extension: default_value=-0.139626 range=(-1.570796 1.570796) clamped=false locked=true
      PhysicalOffsetFrame pelvis_offset: socket_parent_connectee_name=../../pelvis translation=(-0.1007 0.0815 0)
    WeldJoint back_0: socket_parent_frame_connectee_name=torso_offset socket_child_frame_connectee_name=../head
      PhysicalOffsetFrame torso_offset: socket_parent_connectee_name=../../torso translation=(0 0.55 0)
  ForceSet:
    Thelen2003Muscle [values shared by the 18 below unless stated]: optimal_force=1 max_contraction_velocity=15
        FmaxTendonStrain=0.049 activation_time_constant=0.01 [seconds] deactivation_time_constant=0.04 [seconds]
    Thelen2003Muscle hamstrings_r: max_isometric_force=4105.466 optimal_fiber_length=0.069 tendon_slack_length=0.349
        pennation_angle_at_optimal=0.2617994 [radians] FmaxMuscleStrain=0.8
      PathPoint semimem_r-P1: socket_parent_frame_connectee_name=../../../pelvis (-0.1192 -0.09747 0.07151)
      ConditionalPathPoint semimem_r-P2: socket_parent_frame_connectee_name=../../../tibia_r
          (-0.0348 -0.03519 -0.01891) socket_coordinate_connectee_name=../../../knee_r/knee_angle_r
          range=(-0.558505 0.174533) [radians]
      PathPoint semimem_r-P3: socket_parent_frame_connectee_name=../../../tibia_r (-0.027 -0.04771 -0.01957)
    Thelen2003Muscle bifemsh_r: max_isometric_force=557.1148 optimal_fiber_length=0.11 tendon_slack_length=0.117
        pennation_angle_at_optimal=0.4014257
      PathPoint P1: socket_parent_frame_connectee_name=../../../femur_r (0.005 -0.2111 0.0234)
      PathPoint P2: socket_parent_frame_connectee_name=../../../tibia_r (-0.0301 -0.036 0.02943)
      PathPoint P3: socket_parent_frame_connectee_name=../../../tibia_r (-0.0234 -0.0563 0.0343)
    Thelen2003Muscle glut_max_r: max_isometric_force=3337.584 optimal_fiber_length=0.157 tendon_slack_length=0.048
        pennation_angle_at_optimal=0
      PathPoint glut_max2_r-P1: socket_parent_frame_connectee_name=../../../pelvis (-0.1349 0.0176 0.0563)
      PathPoint glut_max2_r-P2: socket_parent_frame_connectee_name=../../../pelvis (-0.1376 -0.052 0.0914)
      PathPoint glut_max2_r-P3: socket_parent_frame_connectee_name=../../../femur_r (-0.0426 -0.053 0.0293)
      PathPoint glut_max2_r-P4: socket_parent_frame_connectee_name=../../../femur_r (-0.0156 -0.1016 0.0419)
    Thelen2003Muscle iliopsoas_r: max_isometric_force=2697.344 optimal_fiber_length=0.117 tendon_slack_length=0.13
        pennation_angle_at_optimal=0.1396263
      PathPoint psoas_r-P1: socket_parent_frame_connectee_name=../../../pelvis (-0.0647 0.0887 0.0289)
      PathPoint psoas_r-P2: socket_parent_frame_connectee_name=../../../pelvis (-0.0238 -0.057 0.0759)
      ConditionalPathPoint psoas_r-P3: socket_parent_frame_connectee_name=../../../pelvis (-0.0288 -0.0805 0.0816)
          socket_coordinate_connectee_name=../../../hip_r/hip_flexion_r range=(-1.5708 0.785398)
      PathPoint psoas_r-P4: socket_parent_frame_connectee_name=../../../femur_r (0.0016 -0.0507 0.0038)
      PathPoint psoas_r-P5: socket_parent_frame_connectee_name=../../../femur_r (-0.0188 -0.0597 0.0104)
    Thelen2003Muscle rect_fem_r: max_isometric_force=2191.741 optimal_fiber_length=0.076 tendon_slack_length=0.346
        pennation_angle_at_optimal=0.08726646 FmaxMuscleStrain=1 KshapePassive=9
      PathPoint P1: socket_parent_frame_connectee_name=../../../pelvis (-0.0295 -0.0311 0.0968)
      ConditionalPathPoint P2: socket_parent_frame_connectee_name=../../../femur_r (0.0334 -0.403 0.0019)
          socket_coordinate_connectee_name=../../../knee_r/knee_angle_r range=(-2.61799 -1.45997)
      MovingPathPoint P3: socket_parent_frame_connectee_name=../../../tibia_r
          socket_x_coordinate_connectee_name=../../../knee_r/knee_angle_r
          socket_y_coordinate_connectee_name=../../../knee_r/knee_angle_r
          socket_z_coordinate_connectee_name=../../../knee_r/knee_angle_r
        x_location: SimmSpline: x=(-2.0944 -1.99997 -1.5708 -1.45752 -1.39626 -1.0472 -0.698132 -0.526391 -0.349066 -0.174533 0 0.00017453 0.00034907 0.0279253 0.0872665 0.174533 2.0944)
            y=(0.0155805 0.0179938 0.0275081 0.0296564 0.0307615 0.0365695 0.0422074 0.0450902 0.048391 0.0534299 0.0617576 0.0617669 0.0617762 0.0633083 0.066994 0.0733035 0.0573481)
        y_location: SimmSpline: x=(-2.0944 -1.99997 -1.5708 -1.45752 -1.39626 -1.0472 -0.698132 -0.526391 -0.349066 -0.174533 0 0.00017453 0.00034907 0.0279253 0.0872665 0.174533 2.0944)
            y=(0.0234116 0.0237613 0.0251141 0.0252795 0.0253146 0.0249184 0.0242373 0.0238447 0.0234197 0.0227644 0.020984 0.0209814 0.0209788 0.0205225 0.0191754 0.0159554 -0.0673774)
        z_location: SimmSpline: x=(-2.0944 0.1745) y=(0.0014 0.0014)
    Thelen2003Muscle vasti_r: max_isometric_force=9593.951 optimal_fiber_length=0.099 tendon_slack_length=0.102
        pennation_angle_at_optimal=0.05235988 FmaxMuscleStrain=1 KshapePassive=9
      PathPoint vas_int_r-P1: socket_parent_frame_connectee_name=../../../femur_r (0.029 -0.1924 0.031)
      PathPoint vas_int_r-P2: socket_parent_frame_connectee_name=../../../femur_r (0.0335 -0.2084 0.0285)
      ConditionalPathPoint vas_int_r-P3: socket_parent_frame_connectee_name=../../../femur_r (0.0343 -0.403 0.0055)
          socket_coordinate_connectee_name=../../../knee_r/knee_angle_r range=(-2.61799 -1.42)
      MovingPathPoint vas_int_r-P4: socket_parent_frame_connectee_name=../../../tibia_r
          socket_x_coordinate_connectee_name=../../../knee_r/knee_angle_r
          socket_y_coordinate_connectee_name=../../../knee_r/knee_angle_r
          socket_z_coordinate_connectee_name=../../../knee_r/knee_angle_r
        x_location: SimmSpline: x=(-2.0944 -1.99997 -1.5708 -1.45752 -1.39626 -1.0472 -0.698132 -0.526391 -0.349066 -0.174533 0 0.00017453 0.00034907 0.0279253 0.0872665 0.174533 2.0944)
            y=(0.0082733 0.0106866 0.0202042 0.022353 0.0234583 0.0292715 0.0349465 0.037871 0.0412569 0.0465287 0.0554632 0.0554735 0.0554837 0.0571717 0.061272 0.0684368 0.0648818)
        y_location: SimmSpline: x=(-2.0944 -1.99997 -1.5708 -1.45752 -1.39626 -1.0472 -0.698132 -0.526391 -0.349066 -0.174533 0 0.00017453 0.00034907 0.0279253 0.0872665 0.174533 2.0944)
            y=(0.025599 0.0259487 0.0273124 0.0274796 0.0275151 0.0271363 0.0265737 0.0263073 0.0261187 0.0260129 0.0252923 0.0252911 0.0252898 0.0250526 0.0242191 0.0218288 -0.0685706)
        z_location: SimmSpline: x=(-2.0944 2.0944) y=(0.0018 0.0018)
    Thelen2003Muscle gastroc_r: max_isometric_force=4690.574 optimal_fiber_length=0.051 tendon_slack_length=0.384
        pennation_angle_at_optimal=0.296706 FmaxTendonStrain=0.1
      PathPoint med_gas_r-P1: socket_parent_frame_connectee_name=../../../femur_r (-0.019 -0.3929 -0.0235)
      ConditionalPathPoint med_gas_r-P2: socket_parent_frame_connectee_name=../../../femur_r (-0.03 -0.4022 -0.0258)
          socket_coordinate_connectee_name=../../../knee_r/knee_angle_r range=(-0.785398 0.174533)
      PathPoint med_gas_r-P3: socket_parent_frame_connectee_name=../../../calcn_r (0 0.031 -0.0053)
    Thelen2003Muscle soleus_r: max_isometric_force=7924.997 optimal_fiber_length=0.044 tendon_slack_length=0.244
        pennation_angle_at_optimal=0.4363323 FmaxTendonStrain=0.1
      PathPoint P1: socket_parent_frame_connectee_name=../../../tibia_r (-0.0024 -0.1533 0.0071)
      PathPoint P2: socket_parent_frame_connectee_name=../../../calcn_r (0 0.031 -0.0053)
    Thelen2003Muscle tib_ant_r: max_isometric_force=2116.818 optimal_fiber_length=0.068 tendon_slack_length=0.238
        pennation_angle_at_optimal=0.08726646
      PathPoint P1: socket_parent_frame_connectee_name=../../../tibia_r (0.0179 -0.1624 0.0115)
      PathPoint P2: socket_parent_frame_connectee_name=../../../tibia_r (0.0329 -0.3951 -0.0177)
      PathPoint P3: socket_parent_frame_connectee_name=../../../calcn_r (0.1166 0.0178 -0.0305)
    Thelen2003Muscle hamstrings_l: max_isometric_force=4105.466 optimal_fiber_length=0.069 tendon_slack_length=0.349
        pennation_angle_at_optimal=0.2617994 FmaxMuscleStrain=0.8
      PathPoint semimem_l-P1: socket_parent_frame_connectee_name=../../../pelvis (-0.1192 -0.09747 -0.07151)
      ConditionalPathPoint semimem_l-P2: socket_parent_frame_connectee_name=../../../tibia_l (-0.0348 -0.03519 0.01891)
          socket_coordinate_connectee_name=../../../knee_l/knee_angle_l range=(-0.558505 0.174533)
      PathPoint semimem_l-P3: socket_parent_frame_connectee_name=../../../tibia_l (-0.027 -0.04771 0.01957)
    Thelen2003Muscle bifemsh_l: max_isometric_force=557.1148 optimal_fiber_length=0.11 tendon_slack_length=0.117
        pennation_angle_at_optimal=0.4014257
      PathPoint P1: socket_parent_frame_connectee_name=../../../femur_l (0.005 -0.2111 -0.0234)
      PathPoint P2: socket_parent_frame_connectee_name=../../../tibia_l (-0.0301 -0.036 -0.02943)
      PathPoint P3: socket_parent_frame_connectee_name=../../../tibia_l (-0.0234 -0.0563 -0.0343)
    Thelen2003Muscle glut_max_l: max_isometric_force=3337.584 optimal_fiber_length=0.157 tendon_slack_length=0.048
        pennation_angle_at_optimal=0
      PathPoint glut_max2_l-P1: socket_parent_frame_connectee_name=../../../pelvis (-0.1349 0.0176 -0.0563)
      PathPoint glut_max2_l-P2: socket_parent_frame_connectee_name=../../../pelvis (-0.1376 -0.052 -0.0914)
      PathPoint glut_max2_l-P3: socket_parent_frame_connectee_name=../../../femur_l (-0.0426 -0.053 -0.0293)
      PathPoint glut_max2_l-P4: socket_parent_frame_connectee_name=../../../femur_l (-0.0156 -0.1016 -0.0419)
    Thelen2003Muscle iliopsoas_l: max_isometric_force=2697.344 optimal_fiber_length=0.117 tendon_slack_length=0.13
        pennation_angle_at_optimal=0.1396263
      PathPoint psoas_l-P1: socket_parent_frame_connectee_name=../../../pelvis (-0.0647 0.0887 -0.0289)
      PathPoint psoas_l-P2: socket_parent_frame_connectee_name=../../../pelvis (-0.0238 -0.057 -0.0759)
      ConditionalPathPoint psoas_l-P3: socket_parent_frame_connectee_name=../../../pelvis (-0.0288 -0.0805 -0.0816)
          socket_coordinate_connectee_name=../../../hip_l/hip_flexion_l range=(-1.5708 0.785398)
      PathPoint psoas_l-P4: socket_parent_frame_connectee_name=../../../femur_l (0.0016 -0.0507 -0.0038)
      PathPoint psoas_l-P5: socket_parent_frame_connectee_name=../../../femur_l (-0.0188 -0.0597 -0.0104)
    Thelen2003Muscle rect_fem_l: max_isometric_force=2191.741 optimal_fiber_length=0.076 tendon_slack_length=0.346
        pennation_angle_at_optimal=0.08726646 FmaxMuscleStrain=1 KshapePassive=9
      PathPoint P1: socket_parent_frame_connectee_name=../../../pelvis (-0.0295 -0.0311 -0.0968)
      ConditionalPathPoint P2: socket_parent_frame_connectee_name=../../../femur_l (0.0334 -0.403 -0.0019)
          socket_coordinate_connectee_name=../../../knee_l/knee_angle_l range=(-2.61799 -1.45997)
      MovingPathPoint P3: socket_parent_frame_connectee_name=../../../tibia_l
          socket_x_coordinate_connectee_name=../../../knee_l/knee_angle_l
          socket_y_coordinate_connectee_name=../../../knee_l/knee_angle_l
          socket_z_coordinate_connectee_name=../../../knee_l/knee_angle_l
        x_location: SimmSpline: x=(-2.0944 -1.99997 -1.5708 -1.45752 -1.39626 -1.0472 -0.698132 -0.526391 -0.349066 -0.174533 0 0.00017453 0.00034907 0.0279253 0.0872665 0.174533 2.0944)
            y=(0.0155805 0.0179938 0.0275081 0.0296564 0.0307615 0.0365695 0.0422074 0.0450902 0.048391 0.0534299 0.0617576 0.0617669 0.0617762 0.0633083 0.066994 0.0733035 0.0573481)
        y_location: SimmSpline: x=(-2.0944 -1.99997 -1.5708 -1.45752 -1.39626 -1.0472 -0.698132 -0.526391 -0.349066 -0.174533 0 0.00017453 0.00034907 0.0279253 0.0872665 0.174533 2.0944)
            y=(0.0234116 0.0237613 0.0251141 0.0252795 0.0253146 0.0249184 0.0242373 0.0238447 0.0234197 0.0227644 0.020984 0.0209814 0.0209788 0.0205225 0.0191754 0.0159554 -0.0673774)
        z_location: SimmSpline: x=(-2.0944 0.1745) y=(-0.0014 -0.0014)
    Thelen2003Muscle vasti_l: max_isometric_force=9593.951 optimal_fiber_length=0.099 tendon_slack_length=0.102
        pennation_angle_at_optimal=0.05235988 FmaxMuscleStrain=1 KshapePassive=9
      PathPoint vas_int_l-P1: socket_parent_frame_connectee_name=../../../femur_l (0.029 -0.1924 -0.031)
      PathPoint vas_int_l-P2: socket_parent_frame_connectee_name=../../../femur_l (0.0335 -0.2084 -0.0285)
      ConditionalPathPoint vas_int_l-P3: socket_parent_frame_connectee_name=../../../femur_l (0.0343 -0.403 -0.0055)
          socket_coordinate_connectee_name=../../../knee_l/knee_angle_l range=(-2.61799 -1.42)
      MovingPathPoint vas_int_l-P4: socket_parent_frame_connectee_name=../../../tibia_l
          socket_x_coordinate_connectee_name=../../../knee_l/knee_angle_l
          socket_y_coordinate_connectee_name=../../../knee_l/knee_angle_l
          socket_z_coordinate_connectee_name=../../../knee_l/knee_angle_l
        x_location: SimmSpline: x=(-2.0944 -1.99997 -1.5708 -1.45752 -1.39626 -1.0472 -0.698132 -0.526391 -0.349066 -0.174533 0 0.00017453 0.00034907 0.0279253 0.0872665 0.174533 2.0944)
            y=(0.0082733 0.0106866 0.0202042 0.022353 0.0234583 0.0292715 0.0349465 0.037871 0.0412569 0.0465287 0.0554632 0.0554735 0.0554837 0.0571717 0.061272 0.0684368 0.0648818)
        y_location: SimmSpline: x=(-2.0944 -1.99997 -1.5708 -1.45752 -1.39626 -1.0472 -0.698132 -0.526391 -0.349066 -0.174533 0 0.00017453 0.00034907 0.0279253 0.0872665 0.174533 2.0944)
            y=(0.025599 0.0259487 0.0273124 0.0274796 0.0275151 0.0271363 0.0265737 0.0263073 0.0261187 0.0260129 0.0252923 0.0252911 0.0252898 0.0250526 0.0242191 0.0218288 -0.0685706)
        z_location: SimmSpline: x=(-2.0944 2.0944) y=(-0.0018 -0.0018)
    Thelen2003Muscle gastroc_l: max_isometric_force=4690.574 optimal_fiber_length=0.051 tendon_slack_length=0.384
        pennation_angle_at_optimal=0.296706 FmaxTendonStrain=0.1
      PathPoint med_gas_l-P1: socket_parent_frame_connectee_name=../../../femur_l (-0.019 -0.3929 0.0235)
      ConditionalPathPoint med_gas_l-P2: socket_parent_frame_connectee_name=../../../femur_l (-0.03 -0.4022 0.0258)
          socket_coordinate_connectee_name=../../../knee_l/knee_angle_l range=(-0.785398 0.174533)
      PathPoint med_gas_l-P3: socket_parent_frame_connectee_name=../../../calcn_l (0 0.031 0.0053)
    Thelen2003Muscle soleus_l: max_isometric_force=7924.997 optimal_fiber_length=0.044 tendon_slack_length=0.244
        pennation_angle_at_optimal=0.4363323 FmaxTendonStrain=0.1
      PathPoint P1: socket_parent_frame_connectee_name=../../../tibia_l (-0.0024 -0.1533 -0.0071)
      PathPoint P2: socket_parent_frame_connectee_name=../../../calcn_l (0 0.031 0.0053)
    Thelen2003Muscle tib_ant_l: max_isometric_force=2116.818 optimal_fiber_length=0.068 tendon_slack_length=0.238
        pennation_angle_at_optimal=0.08726646
      PathPoint P1: socket_parent_frame_connectee_name=../../../tibia_l (0.0179 -0.1624 -0.0115)
      PathPoint P2: socket_parent_frame_connectee_name=../../../tibia_l (0.0329 -0.3951 0.0177)
      PathPoint P3: socket_parent_frame_connectee_name=../../../calcn_l (0.1166 0.0178 0.0305)
    HuntCrossleyForce foot_r: transition_velocity=0.1
      ContactParametersSet contact_parameters:
        ContactParameters: geometry=(platform r_heel r_toe1 r_toe2) stiffness=500000 dissipation=1 static_friction=0.8
            dynamic_friction=0.8 viscous_friction=0
    HuntCrossleyForce foot_l: transition_velocity=0.1
      ContactParametersSet contact_parameters:
        ContactParameters: geometry=(platform l_heel l_toe1 l_toe2) stiffness=500000 dissipation=1 static_friction=0.8
            dynamic_friction=0.8 viscous_friction=0
    CoordinateLimitForce [values shared by the 6 below unless stated]: upper_stiffness=20 [N*m/degree]
        lower_stiffness=20 [N*m/degree] damping=0.25 transition=10 [degrees]
    CoordinateLimitForce HipLimit_r: coordinate=hip_flexion_r upper_limit=120 [degrees] lower_limit=-30 [degrees]
    CoordinateLimitForce HipLimit_l: coordinate=hip_flexion_l upper_limit=120 lower_limit=-30
    CoordinateLimitForce KneeLimit_r: coordinate=knee_angle_r upper_limit=0 lower_limit=-140
    CoordinateLimitForce KneeLimit_l: coordinate=knee_angle_l upper_limit=0 lower_limit=-140
    CoordinateLimitForce AnkleLimit_r: coordinate=ankle_angle_r upper_limit=20 lower_limit=-40
    CoordinateLimitForce AnkleLimit_l: coordinate=ankle_angle_l upper_limit=20 lower_limit=-40
    TorqueActuator [values shared by the 6 below unless stated]: torque_is_global=false axis=(0 0 1) optimal_force=20
    TorqueActuator hip_motor_l: bodyA=pelvis bodyB=femur_l optimal_force=40
    TorqueActuator hip_motor_r: bodyA=pelvis bodyB=femur_r
    TorqueActuator knee_motor_l: bodyA=femur_l bodyB=tibia_l
    TorqueActuator knee_motor_r: bodyA=femur_r bodyB=tibia_r
    TorqueActuator ankle_motor_l: bodyA=tibia_l bodyB=talus_l
    TorqueActuator ankle_motor_r: bodyA=tibia_r bodyB=talus_r
  ContactGeometrySet:
    ContactHalfSpace platform: socket_frame_connectee_name=../ground location=(0 0 0) orientation=(0 0 -1.570796)
    ContactSphere r_heel: socket_frame_connectee_name=../calcn_r location=(0.03 0.02 0) radius=0.05
    ContactSphere r_toe1: socket_frame_connectee_name=../toes_r location=(0.02 -0.005 -0.026) radius=0.025
    ContactSphere r_toe2: socket_frame_connectee_name=../toes_r location=(0.02 -0.005 0.026) radius=0.025
    ContactSphere l_heel: socket_frame_connectee_name=../calcn_l location=(0.03 0.02 0) radius=0.05
    ContactSphere l_toe1: socket_frame_connectee_name=../toes_l location=(0.02 -0.005 -0.026) radius=0.025
    ContactSphere l_toe2: socket_frame_connectee_name=../toes_l location=(0.02 -0.005 0.026) radius=0.025
